*Heading
** Job name: test4-8ply Model name: Model-2
** Generated by: Abaqus/CAE 6.13-1
*Preprint, echo=NO, model=NO, history=NO, contact=NO
**
** PARTS
**
*PARAMETER
theta1=0
theta2=0
theta3=0
theta4=0
*Part, name=Part-1
*Node
      1,   29.5100002,           0.,           0.
      2,   29.5100002,          25.,           0.
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*Element, type=S4R
  1,   1,  13, 275,  64
  2,  13,  14, 276, 275
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** Region: (CompositeLayup-1-1: Generated From Layup), (Controls:EC-1)
*Elset, elset=CompositeLayup-1-1, generate
    1,  1300,     1
** Section: CompositeLayup-1-1
*Shell Section, elset=CompositeLayup-1-1, composite, controls=EC-1, layup=CompositeLayup-1
0.125, 1, Material-1, <theta1>, Ply-1
0.125, 1, Material-1, <theta2>, Ply-2
0.125, 1, Material-1, <theta3>, Ply-3
0.125, 1, Material-1, <theta4>, Ply-4
0.125, 1, Material-1, <theta4>, Ply-5
0.125, 1, Material-1, <theta3>, Ply-6
0.125, 1, Material-1, <theta2>, Ply-7
0.125, 1, Material-1, <theta1>, Ply-8
*End Part
**
**
** ASSEMBLY
**
*Assembly, name=Assembly
**
*Instance, name=Part-1-1, part=Part-1
*End Instance
**
*Node
      1,         200.,         12.5,           0.
*Node
      2,           0.,         12.5,           0.
*Nset, nset=Set-1, instance=Part-1-1
  3,  4, 39, 40, 41, 42, 43, 44, 45, 46, 47, 48, 49, 50
*Elset, elset=Set-1, instance=Part-1-1, generate
 183,  195,    1
*Nset, nset=Set-2, instance=Part-1-1
   9,  10, 141, 142, 143, 144, 145, 146, 147, 148, 149, 150, 151, 152
*Elset, elset=Set-2, instance=Part-1-1, generate
 638,  650,    1
*Nset, nset=Set-7
 2,
*Nset, nset=Set-8
 1,
*Nset, nset=m_Set-3
 1,
*Nset, nset=m_Set-5
 2,
*Nset, nset=s_Set-3, instance=Part-1-1
   7,   8,   9,  10, 115, 116
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*Elset, elset=s_Set-3, instance=Part-1-1, generate
 456,  650,    1
*Nset, nset=s_Set-5, instance=Part-1-1
   1,   2,   3,   4,  13,  14
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*Elset, elset=s_Set-5, instance=Part-1-1, generate
   1,  195,    1
*Surface, type=NODE, name=s_Set-3_CNS_, internal
s_Set-3, 1.
*Surface, type=NODE, name=s_Set-5_CNS_, internal
s_Set-5, 1.
** Constraint: Constraint-1
*Coupling, constraint name=Constraint-1, ref node=m_Set-3, surface=s_Set-3_CNS_
*Kinematic
** Constraint: Constraint-2
*Coupling, constraint name=Constraint-2, ref node=m_Set-5, surface=s_Set-5_CNS_
*Kinematic
*End Assembly
**
** ELEMENT CONTROLS
**
*Section Controls, name=EC-1, hourglass=ENHANCED
1., 1., 1.
**
** MATERIALS
**
*Material, name=Material-1
*Damage Initiation, criterion=HASHIN
2050.,1200., 62.,190.,81.,81.
*Damage Evolution, type=ENERGY
45.,45., 0.6, 0.6
*Damage Stabilization
0.003,0.003,0.003,0.003
*Elastic, type=ENGINEERING CONSTANTS
170000.,9000.,9000., 0.34, 0.34, 0.34, 4800., 4800.
 4500.,
**
** BOUNDARY CONDITIONS
**
** Name: BC-1 Type: Symmetry/Antisymmetry/Encastre
*Boundary
Set-7, ENCASTRE
** Name: BC-2 Type: Displacement/Rotation
*Boundary
Set-8, 1, 1
Set-8, 2, 2
Set-8, 3, 3
Set-8, 4, 4
Set-8, 5, 5
Set-8, 6, 6
** ----------------------------------------------------------------
**
** STEP: Step-1
**
*Step, name=Step-1, nlgeom=YES, inc=250
*Static, stabilize, factor=0.0002, allsdtol=0, continue=NO
0.005, 1., 2e-07, 0.02
**
** BOUNDARY CONDITIONS
**
** Name: BC-2 Type: Displacement/Rotation
*Boundary
Set-8, 1, 1, 3.
Set-8, 3, 3
Set-8, 4, 4
Set-8, 5, 5
Set-8, 6, 6
**
** OUTPUT REQUESTS
**
*Restart, write, frequency=0
**
** FIELD OUTPUT: F-Output-2
**
*Output, field
*Node Output
RF,
**
** FIELD OUTPUT: F-Output-1
**
*Element Output, elset=Part-1-1.CompositeLayup-1-1, directions=YES
1, 2, 3, 4, 5, 6, 7, 8
DAMAGEC, DAMAGEFC, DAMAGEFT, DAMAGEMC, DAMAGEMT, DAMAGESHR, DAMAGET, HSNFCCRT, HSNFTCRT, HSNMCCRT, HSNMTCRT, LE, PE, PEEQ, PEMAG, S
**
** HISTORY OUTPUT: H-Output-1
**
*Output, history, variable=PRESELECT
*End Step
